// converted from file:TX_Austin_NOAA.csv to TX_Austin_2016.glm on 2020-10-14 17:23:59.831475

module tape;
class climate {
	char32 station_id;
	double temperature[degF];
	double humidity[%];
}
object climate
{
	name tmy_file;
	station_id "72254013904";
	object player
	{
		file "TX_Austin_2016.csv";
		property "temperature,humidity";
	};
}
